*Heading
** Job name: Job-1 Model name: Model-1
** Generated by: Abaqus/CAE 2022
*Preprint, echo=NO, model=NO, history=NO, contact=NO
**
** PARTS
**
*Part, name=Part-1
*Node
      1,         300.,          60.,           0.
      2,         280.,          60.,           0.
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*Element, type=S4R
 1,  1,  2, 18, 17
 2,  2,  3, 19, 18
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*Nset, nset=Set-1, generate
  1,  64,   1
*Elset, elset=Set-1, generate
  1,  45,   1
** Section: Section-1
*Shell Section, elset=Set-1, material=Material-1
2., 5
*End Part
**
**
** ASSEMBLY
**
*Assembly, name=Assembly
**
*Instance, name=Part-1-1, part=Part-1
*End Instance
**
*Nset, nset=Set-1, instance=Part-1-1, generate
 16,  64,  16
*Elset, elset=Set-1, instance=Part-1-1, generate
 15,  45,  15
*Nset, nset=Set-2, instance=Part-1-1
 49,
*End Assembly
**
** MATERIALS
**
*Material, name=Material-1
*Density
 256.16,
*Elastic
 1.19e+10, 0.13
** ----------------------------------------------------------------
**
** STEP: Step-1
**
*Step, name=Step-1, nlgeom=NO
*Static
1., 1., 1e-05, 1.
**
** BOUNDARY CONDITIONS
**
** Name: BC-1 Type: Displacement/Rotation
*Boundary
Set-1, 1, 1
Set-1, 2, 2
Set-1, 3, 3
Set-1, 4, 4
Set-1, 5, 5
Set-1, 6, 6
**
** LOADS
**
** Name: Load-1   Type: Concentrated force
*Cload
Set-2, 3, 1.
**
** OUTPUT REQUESTS
**
*Restart, write, frequency=0
**
** FIELD OUTPUT: F-Output-1
**
*Output, field, variable=PRESELECT
**
** HISTORY OUTPUT: H-Output-1
**
*Output, history, variable=PRESELECT
** Define the stiffness matrix generation and output commands here **
**ELEMENT MATRIX OUTPUT, ELSET=Set-1, STIFFNESS=YES, MASS=YES, OUTPUT FILE=USER DEFINED
*ELEMENT MATRIX OUTPUT, ELSET=Set-1, STIFFNESS=YES, OUTPUT FILE=USER DEFINED
*End Step
